2019-01-02
오후 03:44
$PROB Reversible Metabolism
$INPUT ID TIME AMT RATE CMT DV MDV
$DATA reversible-metabolism-nonmem.csv IGNORE=@
$SUBR ADVAN13 TOL6
$MODEL
  COMP (PARENT)
  COMP (METABOLITE)
$PK
  Vc   = THETA(1)*EXP(ETA(1))
  Vm   = THETA(2)
  CLp  = THETA(3)
  CLm  = THETA(4)
  CLd1 = THETA(5)
  CLd2 = THETA(6)
  S1   = Vc
  S2   = Vm

$DES
  Ke1 = CLp/Vc
  Ke2 = CLm/Vm
  K12 = CLd1/Vc
  K21 = CLd2/Vm

  DADT(1) = -Ke1*A(1) - K12*A(1) + K21*A(2)*Vc/Vm
  DADT(2) = -Ke2*A(2) + K12*A(1)*Vm/Vc - K21*A(2)

$ERROR
  Y    = F + F*ERR(1)

$THETA
  (0, 15)
  (0, 3)
  (0, 0.5)
  (0, 0.01)
  (0, 0.003)
  (0, 0.3)

$OMEGA 0 FIX
$SIGMA 0.1
$EST MAX=9999
$COV UNCOND PRINT=ERS

NM-TRAN MESSAGES
 WARNINGS AND ERRORS (IF ANY) FOR PROBLEM    1
 (WARNING  2) NM-TRAN INFERS THAT THE DATA ARE POPULATION.

1NONLINEAR MIXED EFFECTS MODEL PROGRAM (NONMEM) VERSION 7.4.3
 ORIGINALLY DEVELOPED BY STUART BEAL, LEWIS SHEINER, AND ALISON BOECKMANN
 CURRENT DEVELOPERS ARE ROBERT BAUER, ICON DEVELOPMENT SOLUTIONS,
 AND ALISON BOECKMANN. IMPLEMENTATION, EFFICIENCY, AND STANDARDIZATION
 PERFORMED BY NOUS INFOSYSTEMS.
 PROBLEM NO.:         1
 Reversible Metabolism
 TOT. NO. OF OBS RECS:       38
 TOT. NO. OF INDIVIDUALS:        2
 GENERAL NONLINEAR KINETICS MODEL WITH STIFF/NONSTIFF EQUATIONS (LSODA, ADVAN13)
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 #TBLN:      1
 #METH: First Order
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
 #TERM:
0MINIMIZATION SUCCESSFUL
 HOWEVER, PROBLEMS OCCURRED WITH THE MINIMIZATION.
 REGARD THE RESULTS OF THE ESTIMATION STEP CAREFULLY, AND ACCEPT THEM ONLY
 AFTER CHECKING THAT THE COVARIANCE STEP PRODUCES REASONABLE OUTPUT.
 NO. OF FUNCTION EVALUATIONS USED:      422
 NO. OF SIG. DIGITS IN FINAL EST.:  3.4

 TOTAL DATA POINTS NORMALLY DISTRIBUTED (N):           38
 N*LOG(2PI) CONSTANT TO OBJECTIVE FUNCTION:    69.839328523555125
 OBJECTIVE FUNCTION VALUE WITHOUT CONSTANT:   -214.89494471175738
 OBJECTIVE FUNCTION VALUE WITH CONSTANT:      -145.05561618820224
 REPORTED OBJECTIVE FUNCTION DOES NOT CONTAIN CONSTANT

 TOTAL EFFECTIVE ETAS (NIND*NETA):                             0


 #TERE:
 Elapsed estimation  time in seconds:     0.14
0S MATRIX ALGORITHMICALLY SINGULAR
0INVERSE COVARIANCE MATRIX SET TO RS*RMAT, WHERE S* IS A PSEUDO INVERSE OF S
 Elapsed covariance  time in seconds:     0.04
 Elapsed postprocess time in seconds:     0.00

 ********************                                   FIRST ORDER                                  ********************
 #OBJT:**************                       MINIMUM VALUE OF OBJECTIVE FUNCTION                      ********************
 #OBJV:********************************************     -214.895       **************************************************

 ********************                                   FIRST ORDER                                  ********************
 ********************                             FINAL PARAMETER ESTIMATE                           ********************

 THETA - VECTOR OF FIXED EFFECTS PARAMETERS   *********
         TH 1      TH 2      TH 3      TH 4      TH 5      TH 6
         1.41E+01  2.97E+00  4.46E-01  8.33E-03  3.09E-03  6.32E-02

 OMEGA - COV MATRIX FOR RANDOM EFFECTS - ETAS  ********
         ETA1
 ETA1
+        0.00E+00

 SIGMA - COV MATRIX FOR RANDOM EFFECTS - EPSILONS  ****
         EPS1
 EPS1
+        2.35E-03

 OMEGA - CORR MATRIX FOR RANDOM EFFECTS - ETAS  *******
         ETA1
 ETA1
+        0.00E+00

 SIGMA - CORR MATRIX FOR RANDOM EFFECTS - EPSILONS  ***
         EPS1
 EPS1
+        4.84E-02

 ********************                                   FIRST ORDER                                  ********************
 ********************                            STANDARD ERROR OF ESTIMATE                          ********************

 THETA - VECTOR OF FIXED EFFECTS PARAMETERS   *********
         TH 1      TH 2      TH 3      TH 4      TH 5      TH 6
         2.50E-01  1.34E-02  2.03E-03  3.80E-04  7.34E-05  3.17E-05

 OMEGA - COV MATRIX FOR RANDOM EFFECTS - ETAS  ********
         ETA1
 ETA1
+       .........

 SIGMA - COV MATRIX FOR RANDOM EFFECTS - EPSILONS  ****
         EPS1
 EPS1
+        2.26E-04

 OMEGA - CORR MATRIX FOR RANDOM EFFECTS - ETAS  *******
         ETA1
 ETA1
+       .........

 SIGMA - CORR MATRIX FOR RANDOM EFFECTS - EPSILONS  ***
         EPS1
 EPS1
+        2.33E-03

 ********************                                   FIRST ORDER                                  ********************
 ********************                          COVARIANCE MATRIX OF ESTIMATE                         ********************

            TH 1      TH 2      TH 3      TH 4      TH 5      TH 6      OM11      SG11
 TH 1
+        6.26E-02
 TH 2
+        3.36E-03  1.80E-04
 TH 3
+        5.07E-04  2.72E-05  4.10E-06
 TH 4
+        9.50E-05  5.10E-06  7.69E-07  1.44E-07
 TH 5
+        1.84E-05  9.85E-07  1.49E-07  2.79E-08  5.38E-09
 TH 6
+        7.93E-06  4.25E-07  6.42E-08  1.20E-08  2.32E-09  1.01E-09
 OM11
+       ......... ......... ......... ......... ......... ......... .........
 SG11
+       -5.66E-05 -3.03E-06 -4.58E-07 -8.58E-08 -1.66E-08 -7.16E-09 .........  5.11E-08

 ********************                                   FIRST ORDER                                  ********************
 ********************                          CORRELATION MATRIX OF ESTIMATE                        ********************

            TH 1      TH 2      TH 3      TH 4      TH 5      TH 6      OM11      SG11
 TH 1
+        2.50E-01
 TH 2
+        1.00E+00  1.34E-02
 TH 3
+        1.00E+00  1.00E+00  2.03E-03
 TH 4
+        1.00E+00  1.00E+00  1.00E+00  3.80E-04
 TH 5
+        1.00E+00  1.00E+00  1.00E+00  1.00E+00  7.34E-05
 TH 6
+        9.99E-01  9.99E-01  9.99E-01  9.98E-01  9.98E-01  3.17E-05
 OM11
+       ......... ......... ......... ......... ......... ......... .........
 SG11
+       -1.00E+00 -1.00E+00 -1.00E+00 -1.00E+00 -1.00E+00 -9.99E-01 .........  2.26E-04
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
 ********************                                   FIRST ORDER                                  ********************
 ********************                      EIGENVALUES OF COR MATRIX OF ESTIMATE                     ********************

             1         2         3         4         5         6         7
        -1.91E-16  2.25E-15 -3.56E-15  1.05E-14 -1.51E-14  2.54E-03  7.00E+00
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 Elapsed finaloutput time in seconds:     0.03
 #CPUT: Total CPU Time in Seconds,        0.218
